# OpenSim document version 30000
Model SEMLS_2_MRI-scaled:
  credits: Model authors names..
  publications: List of publications related to model...
  length_units: m
  force_units: N
  gravity: 0 -9.80665 0
  BodySet:
    Body ground: mass=0 mass_center=(0 0 0) inertia_xx=0 inertia_yy=0 inertia_zz=0
    Body pelvis: mass=3.59674 mass_center=(-0.074971 -0.0228013 0) inertia_xx=0.02318099 inertia_yy=0.02630912
        inertia_zz=0.02887825 meshes=pelvis_SEMLS_2.vtp
      CustomJoint gnd_pelvis: parent_body=ground location_in_parent=(0 0 0) location=(0 0 0)
        Coordinate lower_torso_RX: motion_type=rotational default_value=0 range=(-4.712389 4.712389) clamped=false
        Coordinate lower_torso_RY: motion_type=rotational default_value=0 range=(-4.712389 4.712389) clamped=false
        Coordinate lower_torso_RZ: motion_type=rotational default_value=0 range=(-4.712389 4.712389) clamped=false
        Coordinate lower_torso_TX: motion_type=translational default_value=0 range=(-10 10) clamped=false
        Coordinate lower_torso_TY: motion_type=translational default_value=0 range=(-10 10) clamped=false
        Coordinate lower_torso_TZ: motion_type=translational default_value=0 range=(-10 10) clamped=false
        SpatialTransform:
          TransformAxis rotation1: coordinates=lower_torso_RX axis=(1 0 0) LinearFunction(coefficients=1 0)
          TransformAxis rotation2: coordinates=lower_torso_RY axis=(0 1 0) LinearFunction(coefficients=1 0)
          TransformAxis rotation3: coordinates=lower_torso_RZ axis=(0 0 1) LinearFunction(coefficients=1 0)
          TransformAxis translation1: coordinates=lower_torso_TX axis=(1 0 0) LinearFunction(coefficients=1 0)
          TransformAxis translation2: coordinates=lower_torso_TY axis=(0 1 0) LinearFunction(coefficients=1 0)
          TransformAxis translation3: coordinates=lower_torso_TZ axis=(0 0 1) LinearFunction(coefficients=1 0)
    Body HeadArmsTrunk: mass=15.81342 mass_center=(0.01096 0.193832 0) inertia_xx=0.3347573 inertia_yy=0.2102544
        inertia_zz=0.4529888 meshes=ribcage_s.vtp
      CustomJoint pelvis_hat: parent_body=pelvis location_in_parent=(-0.073208 0.029257 0) location=(0 0 0)
        Coordinate lumbar_pitch: motion_type=rotational default_value=0 range=(-0.7853982 0.7853982) clamped=true
        Coordinate lumbar_roll: motion_type=rotational default_value=0 range=(-0.7853982 0.7853982) clamped=true
        Coordinate lumbar_yaw: motion_type=rotational default_value=0 range=(-1.047198 1.047198) clamped=true
        SpatialTransform: axes_held_at_zero=(translation1 translation2 translation3)
          TransformAxis rotation1: coordinates=lumbar_pitch axis=(0 0 1) LinearFunction(coefficients=1 0)
          TransformAxis rotation2: coordinates=lumbar_roll axis=(1 0 0) LinearFunction(coefficients=1 0)
          TransformAxis rotation3: coordinates=lumbar_yaw axis=(0 1 0) LinearFunction(coefficients=1 0)
    Body femur_r: mass=4.51766 mass_center=(0 -0.113659 0) inertia_xx=0.07668237 inertia_yy=0.0157282
        inertia_zz=0.07668237 meshes=femur_r_SEMLS_2.vtp
      CustomJoint hip_r: parent_body=pelvis location_in_parent=(-0.0322942 -0.0587386 0.0668986) location=(0 0 0)
        Coordinate hip_flex_r: motion_type=rotational default_value=0 range=(-0.1919862 1.658063) clamped=false
        Coordinate hip_add_r: motion_type=rotational default_value=0 range=(-0.8726646 0.3490659) clamped=true
        Coordinate hip_rot_r: motion_type=rotational default_value=0 range=(-0.6981317 0.6981317) clamped=true
        SpatialTransform: axes_held_at_zero=(translation1 translation2 translation3)
          TransformAxis rotation1: coordinates=hip_flex_r axis=(0 0 1) LinearFunction(coefficients=1 0)
          TransformAxis rotation2: coordinates=hip_add_r axis=(1 0 0) LinearFunction(coefficients=1 0)
          TransformAxis rotation3: coordinates=hip_rot_r axis=(0 1 0) LinearFunction(coefficients=1 0)
    Body tibia_r: mass=1.39426 mass_center=(0 -0.136881 0) inertia_xx=0.01287957 inertia_yy=0.002214072
        inertia_zz=0.01340851 meshes=(tibia_r_SEMLS_2.vtp fibula_r_SEMLS_2.vtp)
      CustomJoint knee_flexion_r: parent_body=femur_r location_in_parent=(0 0 0) location=(0 0 0)
          orientation=(-0.03746154 0.05068845 0.001898941)
        Coordinate knee_flex_r: motion_type=rotational default_value=0 range=(-0.1745329 2.094395) clamped=true
        SpatialTransform: axes_held_at_zero=(rotation2 rotation3)
          TransformAxis rotation1: coordinates=knee_flex_r axis=(0 0 -1) LinearFunction(coefficients=1 0)
          TransformAxis translation1: coordinates=knee_flex_r axis=(1 0 0)
            MultiplierFunction: scale=1
              SimmSpline: x=(0 0.174533 0.349066 0.698132 1.0472 1.39626 1.74533 2.0944)
                  y=(-8.5748e-8 -8.5748e-8 -8.5748e-8 -8.5748e-8 -8.5748e-8 -8.5748e-8 -8.5748e-8 -8.5748e-8)
          TransformAxis translation2: coordinates=knee_flex_r axis=(0 1 0)
            MultiplierFunction: scale=1
              SimmSpline: x=(0 0.174533 0.349066 0.698132 1.0472 1.39626 1.74533 2.0944)
                  y=(-0.301598 -0.301742 -0.301982 -0.302719 -0.303791 -0.305408 -0.307157 -0.307982)
          TransformAxis translation3: coordinates=knee_flex_r axis=(0 0 1)
            MultiplierFunction: scale=1 PiecewiseLinearFunction(x=-17453.3 17453.3, y=2.8026e-8 2.8026e-8)
    Body patella_r: mass=0.04186 mass_center=(0.00143487 0.0210448 0) inertia_xx=1.288e-6 inertia_yy=6.44e-6
        inertia_zz=6.44e-6 meshes=patella_r_SEMLS_2.vtp
      CustomJoint tib_pat_r: parent_body=tibia_r location_in_parent=(0 0 0) location=(0 0 0)
          orientation=(0.09284252 -0.05347154 0.004976333)
        Coordinate tib_pat_r_r3: motion_type=rotational default_value=0 range=(-99999.9 99999.9) clamped=false
        Coordinate tib_pat_r_tx: motion_type=translational default_value=0 range=(-99999.9 99999.9) clamped=false
        Coordinate tib_pat_r_ty: motion_type=translational default_value=0 range=(-99999.9 99999.9) clamped=false
        Coordinate tib_pat_r_tz: motion_type=translational default_value=0 range=(-99999.9 99999.9) clamped=false
        SpatialTransform: axes_held_at_zero=(rotation2 rotation3)
          TransformAxis rotation1: coordinates=tib_pat_r_r3 axis=(0 0 1) LinearFunction(coefficients=1 0)
          TransformAxis translation1: coordinates=tib_pat_r_tx axis=(1 0 0) LinearFunction(coefficients=1 0)
          TransformAxis translation2: coordinates=tib_pat_r_ty axis=(0 1 0) LinearFunction(coefficients=1 0)
          TransformAxis translation3: coordinates=tib_pat_r_tz axis=(0 0 1) LinearFunction(coefficients=1 0)
    Body talus_r: mass=0.01932 mass_center=(0.00444229 0.00185768 0) inertia_xx=1.206272e-6 inertia_yy=4.020593e-7
        inertia_zz=1.206272e-6 meshes=talus_rv.vtp
      CustomJoint ankle_r: parent_body=tibia_r location_in_parent=(0 -0.3074203 0) location=(0 0 0)
        Coordinate ankle_flex_r: motion_type=rotational default_value=0 range=(-0.5235988 0.5235988) clamped=true
        SpatialTransform: axes_held_at_zero=(rotation2 rotation3 translation1 translation2 translation3)
          TransformAxis rotation1: coordinates=ankle_flex_r axis=(-0.104529 -0.1736491 0.9792444)
              LinearFunction(coefficients=1 0)
    Body foot_r: mass=0.37996 mass_center=(0.0822752 0.0126 0) inertia_xx=0.0003655003 inertia_yy=0.0009304375
        inertia_zz=0.001078809
        meshes=(calcaneous_rv.vtp navicular_rv.vtp cuboid_rv.vtp first_cuneiform_rv.vtp second_cuneiform_rv.vtp third_cuneiform_rv.vtp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)
      CustomJoint subtalar_r: parent_body=talus_r location_in_parent=(-0.03939143 -0.03388298 0.006396849)
          location=(0 0 0)
        Coordinate subt_angle_r: motion_type=rotational default_value=0 range=(-0.3490659 0.3490659) clamped=true
        SpatialTransform: axes_held_at_zero=(rotation2 rotation3 translation1 translation2 translation3)
          TransformAxis rotation1: coordinates=subt_angle_r axis=(0.78718 0.604747 -0.120949)
              LinearFunction(coefficients=1 0)
    Body foot_marker_r: mass=0 mass_center=(0 0 0) inertia_xx=0 inertia_yy=0 inertia_zz=0
      WeldJoint foot_mark_r: parent_body=foot_r location_in_parent=(-0.01615374 0.01453856 -0.008076869)
          location=(0 0 0)
    Body toes_r: mass=0.04186 mass_center=(0.0247961 -0.0021 0.00848042) inertia_xx=4.020903e-5 inertia_yy=0.0001025331
        inertia_zz=0.0001182146
        meshes=(prox_phalanx1_rvs.vtp prox_phalanx2_rvs.vtp prox_phalanx3_rvs.vtp prox_phalanx4_rvs.vtp prox_phalanx5_rvs.vtp mid_phalanx2_rvs.vtp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)
      CustomJoint toes_r: parent_body=foot_r location_in_parent=(0.1427997 -0.00161518 0.0008719457) location=(0 0 0)
        Coordinate toe_angle_r: motion_type=rotational default_value=0 range=(-0.5235988 0.5235988) clamped=true
            locked=true
        SpatialTransform: axes_held_at_zero=(rotation2 rotation3 translation1 translation2 translation3)
          TransformAxis rotation1: coordinates=toe_angle_r axis=(0.541717 0 -0.840561) LinearFunction(coefficients=1 0)
    Body femur_l: mass=4.51766 mass_center=(0 -0.114998 0) inertia_xx=0.07668237 inertia_yy=0.0157282
        inertia_zz=0.07668237 meshes=femur_l_SEMLS_2.vtp
      CustomJoint hip_l: parent_body=pelvis location_in_parent=(-0.0328149 -0.0628556 -0.0676744) location=(0 0 0)
        Coordinate hip_flex_l: motion_type=rotational default_value=0 range=(-0.1919862 1.658063) clamped=false
        Coordinate hip_add_l: motion_type=rotational default_value=0 range=(-0.8726646 0.3490659) clamped=true
        Coordinate hip_rot_l: motion_type=rotational default_value=0 range=(-0.6981317 0.6981317) clamped=true
        SpatialTransform: axes_held_at_zero=(translation1 translation2 translation3)
          TransformAxis rotation1: coordinates=hip_flex_l axis=(0 0 1) LinearFunction(coefficients=1 0)
          TransformAxis rotation2: coordinates=hip_add_l axis=(-1 0 0) LinearFunction(coefficients=1 0)
          TransformAxis rotation3: coordinates=hip_rot_l axis=(0 -1 0) LinearFunction(coefficients=1 0)
    Body tibia_l: mass=1.39426 mass_center=(0 -0.136453 0) inertia_xx=0.01287957 inertia_yy=0.002214072
        inertia_zz=0.01340851 meshes=(tibia_l_SEMLS_2.vtp fibula_l_SEMLS_2.vtp)
      CustomJoint knee_flexion_l: parent_body=femur_l location_in_parent=(0 0 0) location=(0 0 0)
          orientation=(0.04022459 -0.09348732 0.003757023)
        Coordinate knee_flex_l: motion_type=rotational default_value=0 range=(-0.1745329 2.094395) clamped=true
        SpatialTransform: axes_held_at_zero=(rotation2 rotation3)
          TransformAxis rotation1: coordinates=knee_flex_l axis=(0 0 -1) LinearFunction(coefficients=1 0)
          TransformAxis translation1: coordinates=knee_flex_l axis=(1 0 0)
            MultiplierFunction: scale=1
              SimmSpline: x=(0 0.174533 0.349066 0.698132 1.0472 1.39626 1.74533 2.0944)
                  y=(6e-8 0.000903063 0.00178506 0.00309546 0.00392706 0.00393126 0.00295686 0.000861063)
          TransformAxis translation2: coordinates=knee_flex_l axis=(0 1 0)
            MultiplierFunction: scale=1
              SimmSpline: x=(0 0.174533 0.349066 0.698132 1.0472 1.39626 1.74533 2.0944)
                  y=(-0.296093 -0.296555 -0.297325 -0.299692 -0.30313 -0.308318 -0.31393 -0.316575)
          TransformAxis translation3: coordinates=knee_flex_l axis=(0 0 1)
            MultiplierFunction: scale=1 PiecewiseLinearFunction(x=-17453.3 17453.3, y=2.7822e-8 2.7822e-8)
    Body patella_l: mass=0.04186 mass_center=(0.00143038 0.020979 0) inertia_xx=1.288e-6 inertia_yy=6.44e-6
        inertia_zz=6.44e-6 meshes=patella_l_SEMLS_2.vtp
      CustomJoint tib_pat_l: parent_body=tibia_l location_in_parent=(0 0 0) location=(0 0 0)
          orientation=(0.1555263 -0.001639061 0.0002569924)
        Coordinate tib_pat_l_r3: motion_type=rotational default_value=0 range=(-99999.9 99999.9) clamped=false
        Coordinate tib_pat_l_tx: motion_type=translational default_value=0 range=(-99999.9 99999.9) clamped=false
        Coordinate tib_pat_l_ty: motion_type=translational default_value=0 range=(-99999.9 99999.9) clamped=false
        Coordinate tib_pat_l_tz: motion_type=translational default_value=0 range=(-99999.9 99999.9) clamped=false
        SpatialTransform: axes_held_at_zero=(rotation2 rotation3)
          TransformAxis rotation1: coordinates=tib_pat_l_r3 axis=(0 0 1) LinearFunction(coefficients=1 0)
          TransformAxis translation1: coordinates=tib_pat_l_tx axis=(1 0 0) LinearFunction(coefficients=1 0)
          TransformAxis translation2: coordinates=tib_pat_l_ty axis=(0 1 0) LinearFunction(coefficients=1 0)
          TransformAxis translation3: coordinates=tib_pat_l_tz axis=(0 0 1) LinearFunction(coefficients=1 0)
    Body talus_l: mass=0.01932 mass_center=(0.00439348 0.00183727 0) inertia_xx=1.15989e-6 inertia_yy=3.865998e-7
        inertia_zz=1.15989e-6 meshes=talus_lv.vtp
      CustomJoint ankle_l: parent_body=tibia_l location_in_parent=(0 -0.3112583 0) location=(0 0 0)
        Coordinate ankle_flex_l: motion_type=rotational default_value=0 range=(-0.5235988 0.5235988) clamped=true
        SpatialTransform: axes_held_at_zero=(rotation2 rotation3 translation1 translation2 translation3)
          TransformAxis rotation1: coordinates=ankle_flex_l axis=(0.104529 0.1736491 0.9792444)
              LinearFunction(coefficients=1 0)
    Body foot_l: mass=0.37996 mass_center=(0.0813712 0.0124615 0) inertia_xx=0.0003514465 inertia_yy=0.0008946615
        inertia_zz=0.001037328
        meshes=(calcaneous_lv.vtp navicular_lv.vtp cuboid_lv.vtp first_cuneiform_lv.vtp second_cuneiform_lv.vtp third_cuneiform_lv.vtp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)
      CustomJoint subtalar_l: parent_body=talus_l location_in_parent=(-0.03895788 -0.03350987 -0.006326753)
          location=(0 0 0)
        Coordinate subt_angle_l: motion_type=rotational default_value=0 range=(-0.3490659 0.3490659) clamped=true
        SpatialTransform: axes_held_at_zero=(rotation2 rotation3 translation1 translation2 translation3)
          TransformAxis rotation1: coordinates=subt_angle_l axis=(-0.78718 -0.604747 -0.120949)
              LinearFunction(coefficients=1 0)
    Body foot_marker_l: mass=0 mass_center=(0 0 0) inertia_xx=0 inertia_yy=0 inertia_zz=0
      WeldJoint foot_mark_l: parent_body=foot_l location_in_parent=(-0.01597583 0.01437872 0.007988391)
          location=(0 0 0)
    Body toes_l: mass=0.04186 mass_center=(0.0245236 -0.00207692 -0.00838791) inertia_xx=3.866296e-5
        inertia_yy=9.859061e-5 inertia_zz=0.0001136692
        meshes=(prox_phalanx1_lvs.vtp prox_phalanx2_lvs.vtp prox_phalanx3_lvs.vtp prox_phalanx4_lvs.vtp prox_phalanx5_lvs.vtp mid_phalanx2_lvs.vtp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)
      CustomJoint toes_l: parent_body=foot_l location_in_parent=(0.1412307 -0.001598058 -0.0008626096) location=(0 0 0)
        Coordinate toe_angle_l: motion_type=rotational default_value=0 range=(-0.5235988 0.5235988) clamped=true
            locked=true
        SpatialTransform: axes_held_at_zero=(rotation2 rotation3 translation1 translation2 translation3)
          TransformAxis rotation1: coordinates=toe_angle_l axis=(-0.541717 0 -0.840561)
              LinearFunction(coefficients=1 0)
  ConstraintSet:
    CoordinateCouplerConstraint tib_pat_r_r3_con: independent_coordinate_names=knee_flex_r
        dependent_coordinate_name=tib_pat_r_r3
      coupled_coordinates_function: SimmSpline: x=(-0.174533 -0.00261799 0.355 0.984889 1.99997 2.0944)
          y=(-0.211461 -0.0927773 0.0560992 0.19171 0.257858 0.257858)
    CoordinateCouplerConstraint tib_pat_r_tx_con: independent_coordinate_names=knee_flex_r
        dependent_coordinate_name=tib_pat_r_tx scale_factor=1
      coupled_coordinates_function: SimmSpline: x=(0 0.174533 0.349066 0.698132 1.0472 1.39626 1.74533 2.0944)
          y=(0.0351917 0.0339917 0.0324917 0.0285917 0.0236917 0.0179917 0.0084753 0.0028917)
    CoordinateCouplerConstraint tib_pat_r_ty_con: independent_coordinate_names=knee_flex_r
        dependent_coordinate_name=tib_pat_r_ty scale_factor=1
      coupled_coordinates_function: SimmSpline: x=(0 0.174533 0.349066 0.698132 1.0472 1.39626 1.74533 2.0944)
          y=(0.00569776 0.00609776 0.00649776 0.00729776 0.00799776 0.00839776 0.00736971 0.00649776)
    CoordinateCouplerConstraint tib_pat_r_tz_con: independent_coordinate_names=knee_flex_r
        dependent_coordinate_name=tib_pat_r_tz scale_factor=1
      coupled_coordinates_function: PiecewiseLinearFunction: x=(-17453.3 17453.3) y=(0.00073425 0.00073425)
    CoordinateCouplerConstraint tib_pat_l_r3_con: independent_coordinate_names=knee_flex_l
        dependent_coordinate_name=tib_pat_l_r3
      coupled_coordinates_function: SimmSpline: x=(-0.174533 -0.00261799 0.355 0.984889 1.99997 2.0944)
          y=(-0.189731 -0.0710478 0.0778288 0.213442 0.27959 0.27959)
    CoordinateCouplerConstraint tib_pat_l_tx_con: independent_coordinate_names=knee_flex_l
        dependent_coordinate_name=tib_pat_l_tx scale_factor=1
      coupled_coordinates_function: SimmSpline: x=(0 0.174533 0.349066 0.698132 1.0472 1.39626 1.74533 2.0944)
          y=(0.032817 0.031617 0.030117 0.026217 0.021317 0.015617 0.0061006 0.000517)
    CoordinateCouplerConstraint tib_pat_l_ty_con: independent_coordinate_names=knee_flex_l
        dependent_coordinate_name=tib_pat_l_ty scale_factor=1
      coupled_coordinates_function: SimmSpline: x=(0 0.174533 0.349066 0.698132 1.0472 1.39626 1.74533 2.0944)
          y=(-0.00180581 -0.00140581 -0.00100581 -0.00020581 0.00049419 0.00089419 -0.00013386 -0.00100581)
    CoordinateCouplerConstraint tib_pat_l_tz_con: independent_coordinate_names=knee_flex_l
        dependent_coordinate_name=tib_pat_l_tz scale_factor=1
      coupled_coordinates_function: PiecewiseLinearFunction: x=(-17453.3 17453.3) y=(-0.00343574 -0.00343574)
  ForceSet:
    Thelen2003Muscle glut_max1_r: max_isometric_force=312.433 optimal_fiber_length=0.0983178
        tendon_slack_length=0.08655082 pennation_angle_at_optimal=0.08726646 [radians]
      PathPoint P1: pelvis (-0.0917 -0.0380763 0.0306001)
      PathPoint P2: pelvis (-0.0811202 -0.074162 0.0466309)
      PathPoint P3: femur_r (-0.024117 -0.090396 0.0152345)
      PathPoint P4: femur_r (-0.00900897 -0.100605 0.0109761)
    Thelen2003Muscle glut_max2_r: max_isometric_force=430.582 optimal_fiber_length=0.09912164
        tendon_slack_length=0.08562953 pennation_angle_at_optimal=0
      PathPoint P1: pelvis (-0.0945981 -0.00705769 0.0369897)
      PathPoint P2: pelvis (-0.0828228 -0.0579491 0.0647831)
      PathPoint P3: femur_r (-0.0319172 -0.0655958 0.0187983)
      PathPoint P4: femur_r (-0.0158965 -0.0780098 0.0140195)
    Thelen2003Muscle glut_max3_r: max_isometric_force=279.479 optimal_fiber_length=0.09896785
        tendon_slack_length=0.07835256 pennation_angle_at_optimal=0.08726646
      PathPoint P1: pelvis (-0.0930716 0.023656 0.0451633)
      PathPoint P2: pelvis (-0.0795752 -0.0401364 0.0861318)
      PathPoint P3: femur_r (-0.0377615 -0.042854 0.0204321)
      PathPoint P4: femur_r (-0.0215646 -0.056454 0.0151886)
    Thelen2003Muscle glut_med1_r: max_isometric_force=460.71 optimal_fiber_length=0.04788524
        tendon_slack_length=0.06982291 pennation_angle_at_optimal=0.1396263
      PathPoint P1: pelvis (-0.0378349 0.0239177 0.0969522)
      PathPoint P2: femur_r (-0.0196403 -0.0296763 0.0368793)
    Thelen2003Muscle glut_med2_r: max_isometric_force=320.342 optimal_fiber_length=0.08749277
        tendon_slack_length=0.03831359 pennation_angle_at_optimal=0
      PathPoint P1: pelvis (-0.0643077 0.0393088 0.075001)
      PathPoint P2: femur_r (-0.021692 -0.0213868 0.0386781)
    Thelen2003Muscle glut_med3_r: max_isometric_force=357.016 optimal_fiber_length=0.0602472
        tendon_slack_length=0.04942952 pennation_angle_at_optimal=0.3316126
      PathPoint P1: pelvis (-0.0788964 0.0121256 0.0470871)
      PathPoint P2: femur_r (-0.0262369 -0.016154 0.0350256)
    Thelen2003Muscle glut_min1_r: max_isometric_force=147.313 optimal_fiber_length=0.04444352
        tendon_slack_length=0.01045401 pennation_angle_at_optimal=0.1745329
      PathPoint P1: pelvis (-0.0176709 -0.00665764 0.0851143)
      PathPoint P2: femur_r (-0.00358064 0.000298488 0.0237379)
    Thelen2003Muscle glut_min2_r: max_isometric_force=154.367 optimal_fiber_length=0.0386029
        tendon_slack_length=0.01791853 pennation_angle_at_optimal=0
      PathPoint P1: pelvis (-0.0423527 -0.000495169 0.0721929)
      PathPoint P2: femur_r (-0.00679073 0.00276135 0.0210972)
    Thelen2003Muscle glut_min3_r: max_isometric_force=172.868 optimal_fiber_length=0.02596373
        tendon_slack_length=0.03485344 pennation_angle_at_optimal=0.3665191
      PathPoint P1: pelvis (-0.0608759 -0.00946634 0.0524207)
      PathPoint P2: femur_r (-0.00967283 0.00531227 0.0207217)
    Thelen2003Muscle add_long_r: max_isometric_force=291.733 optimal_fiber_length=0.09647705
        tendon_slack_length=0.07725376 pennation_angle_at_optimal=0.1047198
      PathPoint P1: pelvis (0.00476903 -0.079601 0.0125019)
      PathPoint P2: femur_r (-0.00185159 -0.147444 0.00543592)
    Thelen2003Muscle add_brev_r: max_isometric_force=200.064 optimal_fiber_length=0.1032073
        tendon_slack_length=0.01008334 pennation_angle_at_optimal=0
      PathPoint P1: pelvis (6.041e-5 -0.0795925 0.0147705)
      PathPoint P2: femur_r (-0.00959551 -0.0969285 0.00601066)
    Thelen2003Muscle add_mag1_r: max_isometric_force=237.484 optimal_fiber_length=0.06220251
        tendon_slack_length=0.042899 pennation_angle_at_optimal=0.08726646
      PathPoint P1: pelvis (-0.0167271 -0.0952533 0.0121973)
      PathPoint P2: femur_r (-0.0122074 -0.0953367 0.0101667)
    Thelen2003Muscle add_mag2_r: max_isometric_force=207.319 optimal_fiber_length=0.07388313
        tendon_slack_length=0.07937842 pennation_angle_at_optimal=0.05235988
      PathPoint P1: pelvis (-0.0312519 -0.106994 0.0285422)
      PathPoint P2: femur_r (0.00166967 -0.171589 0.0061853)
    Thelen2003Muscle add_mag3_r: max_isometric_force=299.181 optimal_fiber_length=0.08642277
        tendon_slack_length=0.1715336 pennation_angle_at_optimal=0.08726646
      PathPoint P1: pelvis (-0.0465113 -0.107271 0.0483442)
      PathPoint P2: femur_r (-0.00684284 -0.281057 -0.0193198)
    Thelen2003Muscle pectineus_r: max_isometric_force=127.46 optimal_fiber_length=0.09387755
        tendon_slack_length=0.0007057725 pennation_angle_at_optimal=0
      PathPoint P1: pelvis (-0.00755083 -0.0640253 0.02844)
      PathPoint P2: femur_r (-0.00817803 -0.0497782 0.0036576)
    Thelen2003Muscle iliacus_r: max_isometric_force=349.522 optimal_fiber_length=0.09486774
        tendon_slack_length=0.08538911 pennation_angle_at_optimal=0.122173
      PathPoint P1: pelvis (-0.0639077 0.0343447 0.0601319)
      PathPoint P2: pelvis (-0.00158458 -0.0441321 0.0645781)
      PathPoint P3: femur_r (0.00200345 -0.0430541 0.000531023)
      PathPoint P4: femur_r (-0.0141649 -0.0534719 0.00174181)
    Thelen2003Muscle psoas_r: max_isometric_force=304.518 optimal_fiber_length=0.08698208
        tendon_slack_length=0.09451251 pennation_angle_at_optimal=0.1396263
      PathPoint P1: pelvis (-0.0648795 0.0650376 0.0168671)
      PathPoint P2: pelvis (-0.00866019 -0.0458819 0.0520877)
      PathPoint P3: femur_r (0.00640157 -0.027554 -0.00701968)
      PathPoint P4: femur_r (-0.00829839 -0.0379131 -0.00474362)
    Thelen2003Muscle quad_fem_r: max_isometric_force=197.645 optimal_fiber_length=0.0255493
        tendon_slack_length=0.01135795 pennation_angle_at_optimal=0
      PathPoint P1: pelvis (-0.0484197 -0.098805 0.0562012)
      PathPoint P2: femur_r (-0.032156 -0.0325256 0.0152559)
    Thelen2003Muscle gemellus_r: max_isometric_force=83.571 optimal_fiber_length=0.01767463
        tendon_slack_length=0.02872128 pennation_angle_at_optimal=0
      PathPoint P1: pelvis (-0.0664958 -0.0681309 0.0451596)
      PathPoint P2: femur_r (-0.0148182 -0.00420989 0.0162602)
    Thelen2003Muscle piri_r: max_isometric_force=236.27 optimal_fiber_length=0.01653106 tendon_slack_length=0.06740687
        pennation_angle_at_optimal=0.1745329
      PathPoint P1: pelvis (-0.0873582 -0.0293312 0.0292036)
      PathPoint P2: pelvis (-0.0691733 -0.040308 0.0422334)
      PathPoint P3: femur_r (-0.00855441 -2.55848e-5 0.017268)
    Thelen2003Muscle TFL_r: max_isometric_force=114.529 optimal_fiber_length=0.07237628 tendon_slack_length=0.3237653
        pennation_angle_at_optimal=0.05235988
      PathPoint P1: pelvis (-0.0113484 0.00531852 0.0956731)
      PathPoint P2: femur_r (0.0113516 -0.069667 0.0482932)
      PathPoint P3: femur_r (0.000687629 -0.297915 0.0343611)
      PathPoint P4: tibia_r (-0.00304974 -0.025371 0.0302062)
    Thelen2003Muscle gracilis_r: max_isometric_force=76.282 optimal_fiber_length=0.2476847
        tendon_slack_length=0.09850802 pennation_angle_at_optimal=0.05235988
      PathPoint P1: pelvis (-0.0158986 -0.0934878 0.0134898)
      PathPoint P2: tibia_r (-0.0240005 -0.028119 -0.0222489)
      PathPoint P3: tibia_r (-0.00971821 -0.0438816 -0.0187642)
    Thelen2003Muscle semimem_r: max_isometric_force=719.265 optimal_fiber_length=0.05532612
        tendon_slack_length=0.2482595 pennation_angle_at_optimal=0.2617994
      PathPoint P1: pelvis (-0.0524834 -0.0872838 0.0603013)
      PathPoint P2: tibia_r (-0.0198077 -0.0282677 -0.0189299)
    Thelen2003Muscle semiten_r: max_isometric_force=232.586 optimal_fiber_length=0.1339667
        tendon_slack_length=0.1746276 pennation_angle_at_optimal=0.08726646
      PathPoint P1: pelvis (-0.055534 -0.109527 0.0557938)
      PathPoint P2: tibia_r (-0.0293168 -0.0273775 -0.0249686)
      PathPoint P3: tibia_r (-0.0135535 -0.0467791 -0.0208792)
      PathPoint P4: tibia_r (0.00333021 -0.0616204 -0.0137317)
    Thelen2003Muscle bi_fem_lh_r: max_isometric_force=506.151 optimal_fiber_length=0.07444952
        tendon_slack_length=0.2328978 pennation_angle_at_optimal=0
      PathPoint P1: pelvis (-0.0604086 -0.0929725 0.0573479)
      PathPoint P2: tibia_r (-0.0152077 -0.0451569 0.0377797)
    Thelen2003Muscle bi_fem_sh_r: max_isometric_force=293.116 optimal_fiber_length=0.1093952
        tendon_slack_length=0.06323137 pennation_angle_at_optimal=0.4014257
      PathPoint P1: femur_r (0.00233571 -0.189579 0.00500681)
      PathPoint P2: tibia_r (-0.0132532 -0.0448121 0.038867)
    Thelen2003Muscle sartorius_r: max_isometric_force=76.97 optimal_fiber_length=0.479758
        tendon_slack_length=0.03314003 pennation_angle_at_optimal=0
      PathPoint P1: pelvis (0.00231982 0.00129393 0.0865751)
      PathPoint P2: femur_r (-0.0147739 -0.264396 -0.0346145)
      PathPoint P3: tibia_r (-0.0200737 -0.0273401 -0.0273745)
      PathPoint P4: tibia_r (-0.00359331 -0.0444519 -0.0224623)
      PathPoint P5: tibia_r (0.0133986 -0.0590443 -0.00703967)
    Thelen2003Muscle rectus_fem_r: max_isometric_force=554.48 optimal_fiber_length=0.06477894
        tendon_slack_length=0.2668298 pennation_angle_at_optimal=0.08726646
      PathPoint P1: pelvis (-0.014651 -0.0178398 0.0726683)
      ConditionalPathPoint P2: femur_r (0.0336493 -0.280678 0.00519552) range=(1.45997 2.61799) coordinate=knee_flex_r
      PathPoint P3: patella_r (-0.00244961 0.027307 0.00525913)
    Thelen2003Muscle vas_med_r: max_isometric_force=902.489 optimal_fiber_length=0.06212906
        tendon_slack_length=0.08796362 pennation_angle_at_optimal=0.08726646
      PathPoint P1: femur_r (0.00119749 -0.150208 0.00355954)
      PathPoint P2: femur_r (0.0159645 -0.197854 -0.0178699)
      ConditionalPathPoint P3: femur_r (0.0307894 -0.282044 -0.00649438) range=(1.20986 2.61799) coordinate=knee_flex_r
      ConditionalPathPoint P4: femur_r (0.0314869 -0.300118 -0.0054717) range=(1.78006 2.61799) coordinate=knee_flex_r
      PathPoint P5: patella_r (-0.00377738 0.0261568 -0.00379172)
    Thelen2003Muscle vas_int_r: max_isometric_force=944.61 optimal_fiber_length=0.05680123
        tendon_slack_length=0.08879142 pennation_angle_at_optimal=0.05235988
      PathPoint P1: femur_r (0.0125789 -0.142827 0.0142922)
      PathPoint P2: femur_r (0.0187764 -0.153983 0.0124934)
      ConditionalPathPoint P3: femur_r (0.0308943 -0.28221 0.00467514) range=(1.42 2.61799) coordinate=knee_flex_r
      PathPoint P4: patella_r (-0.00695689 0.0268957 0.00323618)
    Thelen2003Muscle vas_lat_r: max_isometric_force=1307.529 optimal_fiber_length=0.06173519
        tendon_slack_length=0.1153933 pennation_angle_at_optimal=0.08726646
      PathPoint P1: femur_r (-0.0044179 -0.126472 0.0147737)
      PathPoint P2: femur_r (0.0112403 -0.175812 0.0374464)
      ConditionalPathPoint P3: femur_r (0.0301693 -0.280393 0.0157041) range=(1.20986 2.61799) coordinate=knee_flex_r
      ConditionalPathPoint P4: femur_r (0.0304065 -0.298633 0.0123616) range=(1.91986 2.61799) coordinate=knee_flex_r
      PathPoint P5: patella_r (-0.00315455 0.0244414 0.0103208)
    Thelen2003Muscle pat_lig_r: max_isometric_force=0.797 optimal_fiber_length=0.02967092
        tendon_slack_length=0.00297007 pennation_angle_at_optimal=0
      PathPoint P1: tibia_r (0.0227114 -0.0333233 0.00321171)
      PathPoint P2: patella_r (0.000229743 -0.00396796 -0.00113437)
    Thelen2003Muscle gas_med_r: max_isometric_force=887.543 optimal_fiber_length=0.0314758
        tendon_slack_length=0.2854139 pennation_angle_at_optimal=0.296706
      PathPoint P1: femur_r (-0.00326092 -0.277332 -0.0167315)
      ConditionalPathPoint P2: femur_r (-0.0156386 -0.298435 -0.0221151) range=(-0.349066 0.523599)
          coordinate=knee_flex_r
      PathPoint P3: tibia_r (-0.0173 -0.038436 -0.02352)
      PathPoint P4: foot_r (0.00270971 0.026 -0.00511941)
    Thelen2003Muscle gas_lat_r: max_isometric_force=388.942 optimal_fiber_length=0.04491573 tendon_slack_length=0.27019
        pennation_angle_at_optimal=0.1396263
      PathPoint P1: femur_r (-0.00767091 -0.279012 0.0199722)
      ConditionalPathPoint P2: femur_r (-0.019 -0.297793 0.0200007) range=(-0.349066 0.523599) coordinate=knee_flex_r
      PathPoint P3: tibia_r (-0.01929 -0.037956 0.01873)
      PathPoint P4: foot_r (0.00270971 0.026 -0.00511941)
    Thelen2003Muscle soleus_r: max_isometric_force=2269.343 optimal_fiber_length=0.0200131
        tendon_slack_length=0.1787826 pennation_angle_at_optimal=0.4363323
      PathPoint P1: tibia_r (-0.00191 -0.1222 0.00566)
      PathPoint P2: foot_r (0.00270971 0.0258777 -0.00511941)
    Thelen2003Muscle tib_post_r: max_isometric_force=1018.657 optimal_fiber_length=0.02170159
        tendon_slack_length=0.2170595 pennation_angle_at_optimal=0.2094395
      PathPoint P1: tibia_r (-0.00749 -0.10746 0.00151)
      PathPoint P2: tibia_r (-0.01148 -0.290763 -0.01825)
      PathPoint P3: foot_r (0.0336778 0.026981 -0.0231003)
      PathPoint P4: foot_r (0.0623523 0.0128421 -0.0226938)
    Thelen2003Muscle tib_ant_r: max_isometric_force=485.122 optimal_fiber_length=0.06981242
        tendon_slack_length=0.1588666 pennation_angle_at_optimal=0.08726646
      PathPoint P1: tibia_r (0.01427 -0.12946 0.00917)
      PathPoint P2: tibia_r (0.02623 -0.282783 -0.01411)
      PathPoint P3: foot_r (0.0941721 0.0143808 -0.024639)
    Thelen2003Muscle ext_dig_r: max_isometric_force=276.609 optimal_fiber_length=0.07555458
        tendon_slack_length=0.2555469 pennation_angle_at_optimal=0.1396263
      PathPoint P1: tibia_r (0.00255 -0.11009 0.022)
      PathPoint P2: tibia_r (0.02304 -0.287253 0.00574)
      PathPoint P3: foot_r (0.0744686 0.0313359 -7.74203e-5)
      PathPoint P4: foot_r (0.130521 0.00444199 0.0105001)
      PathPoint P5: toes_r (0.000241938 0.00379359 0.0123582)
      PathPoint P6: toes_r (0.0357778 -0.000319359 0.020197)
    Thelen2003Muscle ext_hal_r: max_isometric_force=87.805 optimal_fiber_length=0.0819345 tendon_slack_length=0.2251473
        pennation_angle_at_optimal=0.1047198
      PathPoint P1: tibia_r (0.00096 -0.14086 0.01818)
      PathPoint P2: tibia_r (0.02599 -0.285503 -0.00678)
      PathPoint P3: foot_r (0.0783493 0.0314229 -0.0170421)
      PathPoint P4: foot_r (0.10443 0.0249584 -0.0207583)
      PathPoint P5: foot_r (0.143595 0.00965818 -0.0220454)
      PathPoint P6: toes_r (0.00983237 0.00839042 -0.0212712)
      PathPoint P7: toes_r (0.0454554 -0.00105485 -0.0149615)
    Thelen2003Muscle flex_dig_r: max_isometric_force=252.607 optimal_fiber_length=0.02461472
        tendon_slack_length=0.2895316 pennation_angle_at_optimal=0.122173
      PathPoint P1: tibia_r (-0.00662 -0.1631 -0.00143)
      PathPoint P2: tibia_r (-0.01228 -0.290763 -0.01562)
      PathPoint P3: foot_r (0.0352165 0.0254422 -0.0226164)
      PathPoint P4: foot_r (0.0571845 0.0142163 -0.0212422)
      PathPoint P5: foot_r (0.132147 -0.00644524 0.00814848)
      PathPoint P6: toes_r (-0.00153873 -0.00630007 0.0118743)
      PathPoint P7: toes_r (0.0230228 -0.00573878 0.0173615)
      PathPoint P8: toes_r (0.035623 -0.00484844 0.0195486)
    Thelen2003Muscle flex_hal_r: max_isometric_force=262.869 optimal_fiber_length=0.03106233
        tendon_slack_length=0.2745344 pennation_angle_at_optimal=0.1745329
      PathPoint P1: tibia_r (-0.0063 -0.18606 0.01945)
      PathPoint P2: tibia_r (-0.01483 -0.292993 -0.01387)
      PathPoint P3: foot_r (0.0302036 0.022297 -0.0194615)
      PathPoint P4: foot_r (0.0838365 0.00549684 -0.0206809)
      PathPoint P5: foot_r (0.136956 -0.00404521 -0.022297)
      PathPoint P6: toes_r (0.00677427 -0.00586458 -0.0217261)
      PathPoint P7: toes_r (0.0452909 -0.00677427 -0.0146711)
    Thelen2003Muscle per_brev_r: max_isometric_force=280.113 optimal_fiber_length=0.03233546
        tendon_slack_length=0.1041081 pennation_angle_at_optimal=0.08726646
      PathPoint P1: tibia_r (-0.00558 -0.21093 0.02591)
      PathPoint P2: tibia_r (-0.01578 -0.301363 0.02256)
      PathPoint P3: tibia_r (-0.01148 -0.310213 0.02304)
      PathPoint P4: foot_r (0.0380424 0.0218035 0.0188228)
      PathPoint P5: foot_r (0.061133 0.0156195 0.0237583)
    Thelen2003Muscle per_long_r: max_isometric_force=609.177 optimal_fiber_length=0.03504184
        tendon_slack_length=0.2467091 pennation_angle_at_optimal=0.1745329
      PathPoint P1: tibia_r (0.0004 -0.12499 0.02886)
      PathPoint P2: tibia_r (-0.0165 -0.303033 0.0228)
      PathPoint P3: tibia_r (-0.01291 -0.312123 0.02304)
      PathPoint P4: foot_r (0.0353811 0.0185809 0.0178454)
      PathPoint P5: foot_r (0.0550071 0.00856462 0.0229358)
      PathPoint P6: foot_r (0.0688169 0.00557426 0.00953237)
      PathPoint P7: foot_r (0.0971624 0.00686137 -0.0148647)
    Thelen2003Muscle per_tert_r: max_isometric_force=72.621 optimal_fiber_length=0.05041234
        tendon_slack_length=0.0638182 pennation_angle_at_optimal=0.2268928
      PathPoint P1: tibia_r (0.0008 -0.22352 0.01841)
      PathPoint P2: tibia_r (0.01825 -0.292193 0.01267)
      PathPoint P3: foot_r (0.0692234 0.0184163 0.0241454)
    Thelen2003Muscle glut_max1_l: max_isometric_force=313.42 optimal_fiber_length=0.1074442
        tendon_slack_length=0.09457969 pennation_angle_at_optimal=0.08726646
      PathPoint P1: pelvis (-0.0948509 0.0214707 -0.0503095)
      PathPoint P2: pelvis (-0.0869628 -0.0447883 -0.0831695)
      PathPoint P3: femur_l (-0.0366295 -0.0424584 -0.0208894)
      PathPoint P4: femur_l (-0.0213841 -0.0558584 -0.0145125)
    Thelen2003Muscle glut_max2_l: max_isometric_force=432.532 optimal_fiber_length=0.1006795
        tendon_slack_length=0.0869847 pennation_angle_at_optimal=0
      PathPoint P1: pelvis (-0.0977409 -0.00995035 -0.0360043)
      PathPoint P2: pelvis (-0.0885537 -0.0607564 -0.0623505)
      PathPoint P3: femur_l (-0.0332482 -0.0646575 -0.0188384)
      PathPoint P4: femur_l (-0.0160577 -0.0763826 -0.0118467)
    Thelen2003Muscle glut_max3_l: max_isometric_force=280.892 optimal_fiber_length=0.09579991
        tendon_slack_length=0.0758485 pennation_angle_at_optimal=0.08726646
      PathPoint P1: pelvis (-0.0936287 -0.0390876 -0.0240141)
      PathPoint P2: pelvis (-0.0863413 -0.0769112 -0.0404545)
      PathPoint P3: femur_l (-0.0277903 -0.0836933 -0.0184772)
      PathPoint P4: femur_l (-0.00859458 -0.0988323 -0.00946838)
    Thelen2003Muscle glut_med1_l: max_isometric_force=461.632 optimal_fiber_length=0.04405471
        tendon_slack_length=0.06423631 pennation_angle_at_optimal=0.1396263
      PathPoint P1: pelvis (-0.0837584 0.00783664 -0.0513042)
      PathPoint P2: femur_l (-0.0295453 -0.012618 -0.0298569)
    Thelen2003Muscle glut_med2_l: max_isometric_force=321.072 optimal_fiber_length=0.08506645
        tendon_slack_length=0.03725101 pennation_angle_at_optimal=0
      PathPoint P1: pelvis (-0.0724638 0.0339895 -0.0791642)
      PathPoint P2: femur_l (-0.0260288 -0.0174611 -0.0331697)
    Thelen2003Muscle glut_med3_l: max_isometric_force=357.857 optimal_fiber_length=0.06285447
        tendon_slack_length=0.05157047 pennation_angle_at_optimal=0.3316126
      PathPoint P1: pelvis (-0.0412335 0.0215871 -0.101825)
      PathPoint P2: femur_l (-0.0246292 -0.0253839 -0.0375601)
    Thelen2003Muscle glut_min1_l: max_isometric_force=147.857 optimal_fiber_length=0.04994053
        tendon_slack_length=0.01174756 pennation_angle_at_optimal=0.1745329
      PathPoint P1: pelvis (-0.0189371 -0.00864451 -0.0877983)
      PathPoint P2: femur_l (-0.00297423 0.000681917 -0.0279355)
    Thelen2003Muscle glut_min2_l: max_isometric_force=155.012 optimal_fiber_length=0.04094143
        tendon_slack_length=0.01900564 pennation_angle_at_optimal=0
      PathPoint P1: pelvis (-0.0433461 -0.00237481 -0.0776535)
      PathPoint P2: femur_l (-0.00644373 0.00531279 -0.0261837)
    Thelen2003Muscle glut_min3_l: max_isometric_force=173.613 optimal_fiber_length=0.02631077
        tendon_slack_length=0.03530393 pennation_angle_at_optimal=0.3665191
      PathPoint P1: pelvis (-0.057703 -0.00965604 -0.0598532)
      PathPoint P2: femur_l (-0.0096072 0.00574373 -0.0235908)
    Thelen2003Muscle add_long_l: max_isometric_force=294.873 optimal_fiber_length=0.09911147
        tendon_slack_length=0.07936044 pennation_angle_at_optimal=0.1047198
      PathPoint P1: pelvis (0.00412454 -0.081789 -0.0125407)
      PathPoint P2: femur_l (-0.00387881 -0.148389 -0.00536237)
    Thelen2003Muscle add_brev_l: max_isometric_force=201.88 optimal_fiber_length=0.1082086
        tendon_slack_length=0.01058112 pennation_angle_at_optimal=0
      PathPoint P1: pelvis (-0.000321499 -0.0804511 -0.0146735)
      PathPoint P2: femur_l (-0.0109077 -0.0971198 -0.00638734)
    Thelen2003Muscle add_mag1_l: max_isometric_force=239.718 optimal_fiber_length=0.06323713
        tendon_slack_length=0.04360928 pennation_angle_at_optimal=0.08726646
      PathPoint P1: pelvis (-0.0169922 -0.096841 -0.0113579)
      PathPoint P2: femur_l (-0.0126925 -0.0939194 -0.00857305)
    Thelen2003Muscle add_mag2_l: max_isometric_force=210.193 optimal_fiber_length=0.07489233
        tendon_slack_length=0.08045964 pennation_angle_at_optimal=0.05235988
      PathPoint P1: pelvis (-0.0313618 -0.108143 -0.0302403)
      PathPoint P2: femur_l (-0.00499114 -0.167806 -0.00560969)
    Thelen2003Muscle add_mag3_l: max_isometric_force=304.695 optimal_fiber_length=0.08627794
        tendon_slack_length=0.1712315 pennation_angle_at_optimal=0.08726646
      PathPoint P1: pelvis (-0.0530876 -0.110322 -0.0459528)
      PathPoint P2: femur_l (-0.0112458 -0.282015 0.0174786)
    Thelen2003Muscle pectineus_l: max_isometric_force=128.508 optimal_fiber_length=0.09553362
        tendon_slack_length=0.0007222405 pennation_angle_at_optimal=0
      PathPoint P1: pelvis (-0.00788381 -0.0662177 -0.0279626)
      PathPoint P2: femur_l (-0.0105789 -0.0493065 -0.00164672)
    Thelen2003Muscle iliacus_l: max_isometric_force=350.627 optimal_fiber_length=0.09844069
        tendon_slack_length=0.08860024 pennation_angle_at_optimal=0.122173
      PathPoint P1: pelvis (-0.0719064 0.029554 -0.0630797)
      PathPoint P2: pelvis (-0.000369309 -0.0501092 -0.0678832)
      PathPoint P3: femur_l (0.003612 -0.0452065 -0.00132117)
      PathPoint P4: femur_l (-0.0151299 -0.053649 -0.00374596)
    Thelen2003Muscle psoas_l: max_isometric_force=305.288 optimal_fiber_length=0.08748356
        tendon_slack_length=0.09505838 pennation_angle_at_optimal=0.1396263
      PathPoint P1: pelvis (-0.0662214 0.0647178 -0.0209538)
      PathPoint P2: pelvis (-0.00999295 -0.0502265 -0.0574856)
      PathPoint P3: femur_l (0.00762014 -0.026748 0.00416144)
      PathPoint P4: femur_l (-0.00861863 -0.0360865 0.00374956)
    Thelen2003Muscle quad_fem_l: max_isometric_force=198.101 optimal_fiber_length=0.02327
        tendon_slack_length=0.01034222 pennation_angle_at_optimal=0
      PathPoint P1: pelvis (-0.0471138 -0.101349 -0.0544697)
      PathPoint P2: femur_l (-0.0312357 -0.0327324 -0.0148495)
    Thelen2003Muscle gemellus_l: max_isometric_force=83.964 optimal_fiber_length=0.01532121
        tendon_slack_length=0.02489179 pennation_angle_at_optimal=0
      PathPoint P1: pelvis (-0.0676415 -0.0693335 -0.0460241)
      PathPoint P2: femur_l (-0.0146975 -0.0022282 -0.0162967)
    Thelen2003Muscle piri_l: max_isometric_force=236.742 optimal_fiber_length=0.01657382 tendon_slack_length=0.06758673
        pennation_angle_at_optimal=0.1745329
      PathPoint P1: pelvis (-0.0900354 -0.0299418 -0.0261202)
      PathPoint P2: pelvis (-0.0720197 -0.0421412 -0.0439735)
      PathPoint P3: femur_l (-0.00982706 0.000535083 -0.0175791)
    Thelen2003Muscle TFL_l: max_isometric_force=115.455 optimal_fiber_length=0.0732031 tendon_slack_length=0.3275001
        pennation_angle_at_optimal=0.05235988
      PathPoint P1: pelvis (-0.00965944 0.00117984 -0.097884)
      PathPoint P2: femur_l (0.011311 -0.0701835 -0.0519602)
      PathPoint P3: femur_l (-0.00519659 -0.297745 -0.0360054)
      PathPoint P4: tibia_l (-0.00573315 -0.0317064 -0.0326231)
    Thelen2003Muscle gracilis_l: max_isometric_force=77.001 optimal_fiber_length=0.2482773
        tendon_slack_length=0.09874901 pennation_angle_at_optimal=0.05235988
      PathPoint P1: pelvis (-0.0135706 -0.093174 -0.0120539)
      PathPoint P2: tibia_l (-0.0292232 -0.0314261 0.0192612)
      PathPoint P3: tibia_l (-0.0127394 -0.0458968 0.0189408)
    Thelen2003Muscle semimem_l: max_isometric_force=727.039 optimal_fiber_length=0.05466511
        tendon_slack_length=0.2453009 pennation_angle_at_optimal=0.2617994
      PathPoint P1: pelvis (-0.0545957 -0.0905351 -0.058538)
      PathPoint P2: tibia_l (-0.0238467 -0.0321561 0.0189414)
    Thelen2003Muscle semiten_l: max_isometric_force=234.68 optimal_fiber_length=0.1311698 tendon_slack_length=0.1709831
        pennation_angle_at_optimal=0.08726646
      PathPoint P1: pelvis (-0.0576106 -0.113928 -0.0498289)
      PathPoint P2: tibia_l (-0.0349918 -0.0312693 0.0191813)
      PathPoint P3: tibia_l (-0.0209383 -0.0474155 0.0201999)
      PathPoint P4: tibia_l (-0.00368156 -0.0656475 0.0104836)
    Thelen2003Muscle bi_fem_lh_l: max_isometric_force=511.055 optimal_fiber_length=0.073483
        tendon_slack_length=0.2298886 pennation_angle_at_optimal=0
      PathPoint P1: pelvis (-0.0632418 -0.096482 -0.0561788)
      PathPoint P2: tibia_l (-0.019628 -0.0477057 -0.036776)
    Thelen2003Muscle bi_fem_sh_l: max_isometric_force=295.161 optimal_fiber_length=0.1078738
        tendon_slack_length=0.06235314 pennation_angle_at_optimal=0.4014257
      PathPoint P1: femur_l (-0.000638883 -0.187959 -0.00254406)
      PathPoint P2: tibia_l (-0.0167015 -0.048062 -0.0355699)
    Thelen2003Muscle sartorius_l: max_isometric_force=77.518 optimal_fiber_length=0.4776543
        tendon_slack_length=0.0329932 pennation_angle_at_optimal=0
      PathPoint P1: pelvis (0.00331487 -0.00440301 -0.0852127)
      PathPoint P2: femur_l (-0.0136981 -0.263436 0.0373051)
      PathPoint P3: tibia_l (-0.0260553 -0.0313468 0.0241355)
      PathPoint P4: tibia_l (-0.00895062 -0.04663 0.0233676)
      PathPoint P5: tibia_l (0.0130934 -0.0624223 0.00077163)
    Thelen2003Muscle rectus_fem_l: max_isometric_force=560.749 optimal_fiber_length=0.06809054
        tendon_slack_length=0.280447 pennation_angle_at_optimal=0.08726646
      PathPoint P1: pelvis (-0.0116026 -0.0230191 -0.0761924)
      ConditionalPathPoint P2: femur_l (0.0283285 -0.283694 -0.0109175) range=(1.45997 2.61799) coordinate=knee_flex_l
      PathPoint P3: patella_l (0.000563916 0.0255416 -0.00213677)
    Thelen2003Muscle vas_med_l: max_isometric_force=913.46 optimal_fiber_length=0.06815694
        tendon_slack_length=0.09649149 pennation_angle_at_optimal=0.08726646
      PathPoint P1: femur_l (0.000931008 -0.152894 -0.00235718)
      PathPoint P2: femur_l (0.0171206 -0.200603 0.0151191)
      ConditionalPathPoint P3: femur_l (0.0288465 -0.284626 0.00107746) range=(1.20986 2.61799) coordinate=knee_flex_l
      ConditionalPathPoint P4: femur_l (0.0282121 -0.300733 -1.34355e-5) range=(1.78006 2.61799) coordinate=knee_flex_l
      PathPoint P5: patella_l (-0.00241124 0.0256864 0.00725199)
    Thelen2003Muscle vas_int_l: max_isometric_force=957.116 optimal_fiber_length=0.06407336
        tendon_slack_length=0.1001645 pennation_angle_at_optimal=0.05235988
      PathPoint P1: femur_l (0.0117466 -0.143898 -0.0102069)
      PathPoint P2: femur_l (0.0166185 -0.156703 -0.00998975)
      ConditionalPathPoint P3: femur_l (0.0250331 -0.284257 -0.0118157) range=(1.42 2.61799) coordinate=knee_flex_l
      PathPoint P4: patella_l (-0.00714517 0.025964 -0.00366393)
    Thelen2003Muscle vas_lat_l: max_isometric_force=1323.17 optimal_fiber_length=0.06791518
        tendon_slack_length=0.1269465 pennation_angle_at_optimal=0.08726646
      PathPoint P1: femur_l (-0.00784515 -0.129217 -0.0125545)
      PathPoint P2: femur_l (0.00684563 -0.177061 -0.0347644)
      ConditionalPathPoint P3: femur_l (0.0234755 -0.284069 -0.0240949) range=(1.20986 2.61799) coordinate=knee_flex_l
      ConditionalPathPoint P4: femur_l (0.0229253 -0.301896 -0.0218492) range=(1.91986 2.61799) coordinate=knee_flex_l
      PathPoint P5: patella_l (-0.00176913 0.0239153 -0.0126912)
    Thelen2003Muscle pat_lig_l: max_isometric_force=0.795 optimal_fiber_length=0.03197256
        tendon_slack_length=0.003194841 pennation_angle_at_optimal=0
      PathPoint P1: tibia_l (0.0209131 -0.0403784 -0.00688445)
      PathPoint P2: patella_l (0.000268767 -0.000953786 3.06048e-5)
    Thelen2003Muscle gas_med_l: max_isometric_force=885.15 optimal_fiber_length=0.03206629 tendon_slack_length=0.29072
        pennation_angle_at_optimal=0.296706
      PathPoint P1: femur_l (-0.00901 -0.27863 0.01667)
      ConditionalPathPoint P2: femur_l (-0.0194438 -0.301862 0.022082) range=(-0.349066 0.523599)
          coordinate=knee_flex_l
      PathPoint P3: tibia_l (-0.01724 -0.0384238 0.02344)
      PathPoint P4: foot_l (0.00268557 0.026 0.00506748)
    Thelen2003Muscle gas_lat_l: max_isometric_force=387.906 optimal_fiber_length=0.04573452
        tendon_slack_length=0.2751353 pennation_angle_at_optimal=0.1396263
      PathPoint P1: femur_l (-0.01099 -0.27983 -0.01929)
      ConditionalPathPoint P2: femur_l (-0.0207169 -0.296449 -0.0179382) range=(-0.349066 0.523599)
          coordinate=knee_flex_l
      PathPoint P3: tibia_l (-0.01923 -0.0379438 -0.01867)
      PathPoint P4: foot_l (0.00268557 0.026 0.00506748)
    Thelen2003Muscle soleus_l: max_isometric_force=2263.887 optimal_fiber_length=0.02132339
        tendon_slack_length=0.1905109 pennation_angle_at_optimal=0.4363323
      PathPoint P1: tibia_l (-0.00191 -0.12182 -0.00564)
      PathPoint P2: foot_l (0.00268557 0.0255936 0.00506748)
    Thelen2003Muscle tib_post_l: max_isometric_force=1017.126 optimal_fiber_length=0.02226275
        tendon_slack_length=0.2226006 pennation_angle_at_optimal=0.2094395
      PathPoint P1: tibia_l (-0.00747 -0.10712 -0.00151)
      PathPoint P2: tibia_l (-0.01144 -0.294654 0.0182)
      PathPoint P3: foot_l (0.0333087 0.0266849 0.0228416)
      PathPoint P4: foot_l (0.0616638 0.0126972 0.022443)
    Thelen2003Muscle tib_ant_l: max_isometric_force=484.782 optimal_fiber_length=0.06835754
        tendon_slack_length=0.1555418 pennation_angle_at_optimal=0.08726646
      PathPoint P1: tibia_l (0.01422 -0.12905 -0.00914)
      PathPoint P2: tibia_l (0.02614 -0.286704 0.01407)
      PathPoint P3: foot_l (0.093141 0.0142155 0.0243599)
    Thelen2003Muscle ext_dig_l: max_isometric_force=277.002 optimal_fiber_length=0.0743307
        tendon_slack_length=0.2514021 pennation_angle_at_optimal=0.1396263
      PathPoint P1: tibia_l (0.00254 -0.10974 -0.02193)
      PathPoint P2: tibia_l (0.02297 -0.291154 -0.00572)
      PathPoint P3: foot_l (0.0736492 0.0309932 7.59172e-5)
      PathPoint P4: foot_l (0.129088 0.00439371 -0.0103817)
      PathPoint P5: toes_l (0.000237241 0.0037579 -0.0122227)
      PathPoint P6: toes_l (0.0353869 -0.000322648 -0.0199662)
    Thelen2003Muscle ext_hal_l: max_isometric_force=87.981 optimal_fiber_length=0.08040741 tendon_slack_length=0.220947
        pennation_angle_at_optimal=0.1047198
      PathPoint P1: tibia_l (0.00095 -0.14042 -0.01812)
      PathPoint P2: tibia_l (0.02591 -0.289404 0.00675)
      PathPoint P3: foot_l (0.077483 0.0310786 0.0168536)
      PathPoint P4: foot_l (0.103285 0.0246826 0.0205261)
      PathPoint P5: foot_l (0.142013 0.00955608 0.0218072)
      PathPoint P6: toes_l (0.00971741 0.00830345 0.0210291)
      PathPoint P7: toes_l (0.044962 -0.00104386 0.0147944)
    Thelen2003Muscle flex_dig_l: max_isometric_force=253.254 optimal_fiber_length=0.02499302
        tendon_slack_length=0.2939963 pennation_angle_at_optimal=0.122173
      PathPoint P1: tibia_l (-0.0066 -0.16259 0.00143)
      PathPoint P2: tibia_l (-0.01224 -0.294654 0.01558)
      PathPoint P3: foot_l (0.034827 0.0251666 0.0223671)
      PathPoint P4: foot_l (0.0565583 0.0140637 0.0210101)
      PathPoint P5: foot_l (0.130692 -0.00637705 -0.00805672)
      PathPoint P6: toes_l (-0.00151834 -0.0062347 -0.0117387)
      PathPoint P7: toes_l (0.0227657 -0.00567481 -0.0171763)
      PathPoint P8: toes_l (0.0352256 -0.00479228 -0.0193304)
    Thelen2003Muscle flex_hal_l: max_isometric_force=263.665 optimal_fiber_length=0.03164681
        tendon_slack_length=0.2796712 pennation_angle_at_optimal=0.1745329
      PathPoint P1: tibia_l (-0.00628 -0.18547 -0.01939)
      PathPoint P2: tibia_l (-0.01478 -0.296874 0.01383)
      PathPoint P3: foot_l (0.0298734 0.0220445 0.0192545)
      PathPoint P4: foot_l (0.0829206 0.00542808 0.0204502)
      PathPoint P5: foot_l (0.135446 -0.00400463 0.022054)
      PathPoint P6: toes_l (0.0066997 -0.00579818 0.0214846)
      PathPoint P7: toes_l (0.0447912 -0.0066997 0.0145192)
    Thelen2003Muscle per_brev_l: max_isometric_force=279.968 optimal_fiber_length=0.03353087
        tendon_slack_length=0.1079606 pennation_angle_at_optimal=0.08726646
      PathPoint P1: tibia_l (-0.00556 -0.21027 -0.02583)
      PathPoint P2: tibia_l (-0.01573 -0.305214 -0.02249)
      PathPoint P3: tibia_l (-0.01144 -0.314044 -0.02297)
      PathPoint P4: foot_l (0.0376265 0.02157 -0.0186092)
      PathPoint P5: foot_l (0.0604586 0.0154492 -0.0235059)
    Thelen2003Muscle per_long_l: max_isometric_force=609.426 optimal_fiber_length=0.03568571
        tendon_slack_length=0.2512869 pennation_angle_at_optimal=0.1745329
      PathPoint P1: tibia_l (0.0004 -0.1246 -0.02877)
      PathPoint P2: tibia_l (-0.01645 -0.306884 -0.02273)
      PathPoint P3: tibia_l (-0.01287 -0.315944 -0.02297)
      PathPoint P4: foot_l (0.0349884 0.018372 -0.0176508)
      PathPoint P5: foot_l (0.0543947 0.00846477 -0.0226898)
      PathPoint P6: foot_l (0.0680598 0.00551349 -0.00942323)
      PathPoint P7: foot_l (0.0961017 0.00679459 0.0146995)
    Thelen2003Muscle per_tert_l: max_isometric_force=72.626 optimal_fiber_length=0.0501704
        tendon_slack_length=0.06350982 pennation_angle_at_optimal=0.2268928
      PathPoint P1: tibia_l (0.00079 -0.22282 -0.01836)
      PathPoint P2: tibia_l (0.0182 -0.296084 -0.01264)
      PathPoint P3: foot_l (0.0684584 0.0182106 -0.0238855)
    ObjectGroup right: members=(TFL_r add_brev_r add_long_r add_mag1_r add_mag2_r add_mag3_r bi_fem_lh_r bi_fem_sh_r ext_dig_r ext_hal_r flex_dig_r flex_hal_r gas_lat_r gas_med_r gemellus_r glut_max1_r glut_max2_r glut_max3_r glut_med1_r glut_med2_r glut_med3_r glut_min1_r glut_min2_r glut_min3_r gracilis_r iliacus_r pat_lig_r pectineus_r per_brev_r per_long_r per_tert_r piri_r psoas_r quad_fem_r rectus_fem_r sartorius_r semimem_r semiten_r soleus_r tib_ant_r tib_post_r vas_int_r vas_lat_r vas_med_r)
    ObjectGroup leg_r: members=(TFL_r add_brev_r add_long_r add_mag1_r add_mag2_r add_mag3_r bi_fem_lh_r bi_fem_sh_r ext_dig_r ext_hal_r flex_dig_r flex_hal_r gas_lat_r gas_med_r gemellus_r glut_max1_r glut_max2_r glut_max3_r glut_med1_r glut_med2_r glut_med3_r glut_min1_r glut_min2_r glut_min3_r gracilis_r iliacus_r pat_lig_r pectineus_r per_brev_r per_long_r per_tert_r piri_r psoas_r quad_fem_r rectus_fem_r sartorius_r semimem_r semiten_r soleus_r tib_ant_r tib_post_r vas_int_r vas_lat_r vas_med_r)
    ObjectGroup hip_r: members=(TFL_r add_brev_r add_long_r add_mag1_r add_mag2_r add_mag3_r bi_fem_lh_r gemellus_r glut_max1_r glut_max2_r glut_max3_r glut_med1_r glut_med2_r glut_med3_r glut_min1_r glut_min2_r glut_min3_r gracilis_r iliacus_r pectineus_r piri_r psoas_r quad_fem_r rectus_fem_r sartorius_r semimem_r semiten_r)
    ObjectGroup knee_r: members=(bi_fem_lh_r bi_fem_sh_r gas_lat_r gas_med_r gracilis_r pat_lig_r rectus_fem_r sartorius_r semimem_r semiten_r vas_int_r vas_lat_r vas_med_r)
    ObjectGroup ankle_r: members=(ext_dig_r ext_hal_r flex_dig_r flex_hal_r gas_lat_r gas_med_r per_brev_r per_long_r per_tert_r soleus_r tib_ant_r tib_post_r)
    ObjectGroup left: members=(TFL_l add_brev_l add_long_l add_mag1_l add_mag2_l add_mag3_l bi_fem_lh_l bi_fem_sh_l ext_dig_l ext_hal_l flex_dig_l flex_hal_l gas_lat_l gas_med_l gemellus_l glut_max1_l glut_max2_l glut_max3_l glut_med1_l glut_med2_l glut_med3_l glut_min1_l glut_min2_l glut_min3_l gracilis_l iliacus_l pat_lig_l pectineus_l per_brev_l per_long_l per_tert_l piri_l psoas_l quad_fem_l rectus_fem_l sartorius_l semimem_l semiten_l soleus_l tib_ant_l tib_post_l vas_int_l vas_lat_l vas_med_l)
    ObjectGroup leg_l: members=(TFL_l add_brev_l add_long_l add_mag1_l add_mag2_l add_mag3_l bi_fem_lh_l bi_fem_sh_l ext_dig_l ext_hal_l flex_dig_l flex_hal_l gas_lat_l gas_med_l gemellus_l glut_max1_l glut_max2_l glut_max3_l glut_med1_l glut_med2_l glut_med3_l glut_min1_l glut_min2_l glut_min3_l gracilis_l iliacus_l pat_lig_l pectineus_l per_brev_l per_long_l per_tert_l piri_l psoas_l quad_fem_l rectus_fem_l sartorius_l semimem_l semiten_l soleus_l tib_ant_l tib_post_l vas_int_l vas_lat_l vas_med_l)
    ObjectGroup hip_l: members=(TFL_l add_brev_l add_long_l add_mag1_l add_mag2_l add_mag3_l bi_fem_lh_l bi_fem_sh_l gemellus_l glut_max1_l glut_max2_l glut_max3_l glut_med1_l glut_med2_l glut_med3_l glut_min1_l glut_min2_l glut_min3_l gracilis_l iliacus_l pectineus_l piri_l psoas_l quad_fem_l rectus_fem_l sartorius_l semimem_l semiten_l)
    ObjectGroup knee_l: members=(bi_fem_lh_l bi_fem_sh_l gas_lat_l gas_med_l gracilis_l pat_lig_l rectus_fem_l sartorius_l semimem_l semiten_l vas_int_l vas_lat_l vas_med_l)
    ObjectGroup ankle_l: members=(ext_dig_l ext_hal_l flex_dig_l flex_hal_l gas_lat_l gas_med_l per_brev_l per_long_l per_tert_l soleus_l tib_ant_l tib_post_l)
  MarkerSet:
    Marker RASI: pelvis (0.025559 0.00521673 0.101766)
    Marker RPSI: pelvis (-0.132665 -0.00367255 0.0264397)
    Marker LASI: pelvis (0.0169833 -0.00183549 -0.0960222)
    Marker LPSI: pelvis (-0.133932 -0.00542696 -0.0326823)
    Marker T10: HeadArmsTrunk (-0.0789649 0.131755 0.00318038)
    Marker CLAV: HeadArmsTrunk (0.0417755 0.281541 0.00338631)
    Marker STRN: HeadArmsTrunk (0.0883445 0.161811 0.00170503)
    Marker C7: HeadArmsTrunk (-0.0691596 0.32942 -0.00120826)
    Marker RSHO: HeadArmsTrunk (-0.0370372 0.356011 0.11338) fixed=true
    Marker LSHO: HeadArmsTrunk (-0.0370372 0.356011 -0.11338) fixed=true
    Marker RKNE: femur_r (0.00954284 -0.292689 0.0392196)
    Marker RMKNE: femur_r (0.00202819 -0.292807 -0.0543728) fixed=true
    Marker RF1: femur_r (0.0307017 -0.134088 0.0643217)
    Marker RF2: femur_r (0.00619045 -0.166989 0.0646901)
    Marker RF3: femur_r (-0.02921 -0.138999 0.0652699)
    Marker RTHI: femur_r (0.0439357 -0.226013 0.105887)
    Marker RANK: tibia_r (-0.00124579 -0.299789 0.0329794)
    Marker RMMA: tibia_r (0.00539196 -0.296672 -0.0459356)
    Marker RT1: tibia_r (0.00207864 -0.0609755 0.0472241)
    Marker RT2: tibia_r (-0.00771051 -0.0965545 0.0538881)
    Marker RT3: tibia_r (-0.0411578 -0.066229 0.0536872)
    Marker RTIB: tibia_r (0.102851 -0.14722 0.0170406)
    Marker RTOE: foot_marker_r (0.154932 0.00550635 0.0218799)
    Marker RD5M: foot_marker_r (0.133738 -0.013954 0.0524223)
    Marker RHEE: foot_marker_r (-0.0025546 0.00237276 -0.000998478)
    Marker LKNE: femur_l (-0.0138602 -0.291456 -0.0472101)
    Marker LMKNE: femur_l (-0.00213718 -0.301591 0.0523998) fixed=true
    Marker LF1: femur_l (0.0143574 -0.131577 -0.0689934)
    Marker LF2: femur_l (-0.0223302 -0.156588 -0.0642419)
    Marker LF3: femur_l (-0.0480047 -0.117904 -0.0575155)
    Marker LTHI: femur_l (-0.0198518 -0.215093 -0.108609)
    Marker LANK: tibia_l (-0.00983175 -0.303578 -0.0363631)
    Marker LMMA: tibia_l (-0.000835501 -0.293718 0.0413975)
    Marker LTIB: tibia_l (0.0712995 -0.15817 -0.0646816)
    Marker LT1: tibia_l (-0.0169204 -0.0888444 -0.0556185)
    Marker LT2: tibia_l (-0.0398603 -0.12229 -0.0567182)
    Marker LT3: tibia_l (-0.0596597 -0.0863596 -0.0555185)
    Marker LTOE: foot_marker_l (0.160124 0.00995386 -0.010563)
    Marker LD5M: foot_marker_l (0.142411 -0.00233959 -0.0506772)
    Marker LHEE: foot_marker_l (-0.000184337 0.0165907 -0.00512049)
